# starting concentration
c_0 := 10^5
# begin and end times
t_0 := 0
t_E := 5
k := 2.0
solve block
    # constraints
    c(t_0) == c_0
    d/dt(c(t)) == -k*c(t)
    # solver
    F(k) := odesolve(c(t), t_E)
end solve block
p_1 := F(2)
p_2 := F(2/2)
p_3 := F(2/3)
# [plot: p_1(t), p_2(t), p_3(t) vs t]
