# starting concentration
F_0 := 480*10^6*365
V := 458*10^9
# begin and end times
t_0 := 0
t_E := 10
c_0 := 10
ε := 0.5
solve block
    # constraints
    c(t_0) == c_0
    d/dt(c(t)) == -F_0/V*(1 + ε*cos(2*π*t))*c(t)
    # solver
    c := odesolve(c(t), t_E)
end solve block
# [plot: c(t) vs t]
